// SBML level 3 version 2

model combined_model_of__mwcb8c8bc7_2610_4b53_8bd8_1f0766ab430e_mwed3bf097_6c24_4aff_814a_4781890e4ead_IPTG_reservoir_IPTG_membrane()
  // model units - substance: substance, time: second, extent: mole

  // Compartments:
  compartment cell_internal_combined = 4 volume;
  compartment cell_external_combined = 1 litre;

  // Species:
  species protein_alHL in cell_internal_combined = 0;
  species RNA_utr1_alHL in cell_internal_combined = 0; RNA_utr1_alHL is "RNA utr1--alHL";
  species Ribo_RNA_utr1_alHL in cell_internal_combined = 0; Ribo_RNA_utr1_alHL is "Ribo:RNA utr1--alHL";
  species DNA_pOR1OR2_utr1_alHL in cell_internal_combined = 1.000001/cell_internal_combined; DNA_pOR1OR2_utr1_alHL is "DNA pOR1OR2--utr1--alHL";
  species RNAP_DNA_pOR1OR2_utr1_alHL in cell_internal_combined = 0; RNAP_DNA_pOR1OR2_utr1_alHL is "RNAP:DNA pOR1OR2--utr1--alHL";
  species CUTP_AGTP_RNAP_DNA_pOR1OR2_utr1_alHL in cell_internal_combined = 0; CUTP_AGTP_RNAP_DNA_pOR1OR2_utr1_alHL is "CUTP:AGTP:RNAP:DNA pOR1OR2--utr1--alHL";
  species term_RNAP_DNA_pOR1OR2_utr1_alHL in cell_internal_combined = 0; term_RNAP_DNA_pOR1OR2_utr1_alHL is "term_RNAP:DNA pOR1OR2--utr1--alHL";
  species AA_2AGTP_Ribo_RNA_utr1_alHL in cell_internal_combined = 0; AA_2AGTP_Ribo_RNA_utr1_alHL is "AA:2AGTP:Ribo:RNA utr1--alHL";
  species term_Ribo_RNA_utr1_alHL in cell_internal_combined = 0; term_Ribo_RNA_utr1_alHL is "term_Ribo:RNA utr1--alHL";
  species AGTP_RNAP_DNA_pOR1OR2_utr1_alHL in cell_internal_combined = 0; AGTP_RNAP_DNA_pOR1OR2_utr1_alHL is "AGTP:RNAP:DNA pOR1OR2--utr1--alHL";
  species CUTP_RNAP_DNA_pOR1OR2_utr1_alHL in cell_internal_combined = 0; CUTP_RNAP_DNA_pOR1OR2_utr1_alHL is "CUTP:RNAP:DNA pOR1OR2--utr1--alHL";
  species AA_Ribo_RNA_utr1_alHL in cell_internal_combined = 0; AA_Ribo_RNA_utr1_alHL is "AA:Ribo:RNA utr1--alHL";
  species RNA_utr1_alHL_RNase in cell_internal_combined = 0; RNA_utr1_alHL_RNase is "RNA utr1--alHL:RNase";
  species Ribo_RNA_utr1_alHL_RNase in cell_internal_combined = 0; Ribo_RNA_utr1_alHL_RNase is "Ribo:RNA utr1--alHL:RNase";
  species AA_2AGTP_Ribo_RNA_utr1_alHL_RNase in cell_internal_combined = 0; AA_2AGTP_Ribo_RNA_utr1_alHL_RNase is "AA:2AGTP:Ribo:RNA utr1--alHL:RNase";
  species term_Ribo_RNA_utr1_alHL_RNase in cell_internal_combined = 0; term_Ribo_RNA_utr1_alHL_RNase is "term_Ribo:RNA utr1--alHL:RNase";
  species AA_Ribo_RNA_utr1_alHL_RNase in cell_internal_combined = 0; AA_Ribo_RNA_utr1_alHL_RNase is "AA:Ribo:RNA utr1--alHL:RNase";
  species mw3c367a17_7386_470c_8c72_954a48def552_1_combined in cell_internal_combined = 100.0001/cell_internal_combined; mw3c367a17_7386_470c_8c72_954a48def552_1_combined is "RNAP";
  species mw27aa16fc_b76d_46c2_b301_0456b7e3aace_1_combined in cell_internal_combined = 30.00002/cell_internal_combined; mw27aa16fc_b76d_46c2_b301_0456b7e3aace_1_combined is "Ribo";
  species mw8db70522_81fd_468e_bfee_2b7b2106514e_1_combined in cell_internal_combined = 5.000003/cell_internal_combined; mw8db70522_81fd_468e_bfee_2b7b2106514e_1_combined is "RecBCD";
  species mw288eb330_bc2f_470f_9628_e990cb2252e5_1_combined in cell_internal_combined = 100.0001/cell_internal_combined; mw288eb330_bc2f_470f_9628_e990cb2252e5_1_combined is "RNase";
  species mw34fb2519_79b1_4f10_8668_6410726988c5_1_combined in cell_internal_combined = 3180048/cell_internal_combined; mw34fb2519_79b1_4f10_8668_6410726988c5_1_combined is "AGTP";
  species mw4f8d0806_0366_43d5_8a2a_a05ee3287512_1_combined in cell_internal_combined = 1908029/cell_internal_combined; mw4f8d0806_0366_43d5_8a2a_a05ee3287512_1_combined is "CUTP";
  species mw715c6bbe_f050_4257_8bc2_159625dc5aa5_1_combined in cell_internal_combined = 3.180048e7/cell_internal_combined; mw715c6bbe_f050_4257_8bc2_159625dc5aa5_1_combined is "AA";
  species protein_lacI in cell_internal_combined = 0;
  species protein_lacIdimer in cell_internal_combined = 0;
  species protein_lacItetramer in cell_internal_combined = 0;
  species RNA_utr1_lacI in cell_internal_combined = 0; RNA_utr1_lacI is "RNA utr1--lacI";
  species Ribo_RNA_utr1_lacI in cell_internal_combined = 0; Ribo_RNA_utr1_lacI is "Ribo:RNA utr1--lacI";
  species DNA_pOR1OR2_utr1_lacI in cell_internal_combined = 20.00001/cell_internal_combined; DNA_pOR1OR2_utr1_lacI is "DNA pOR1OR2--utr1--lacI";
  species RNAP_DNA_pOR1OR2_utr1_lacI in cell_internal_combined = 0; RNAP_DNA_pOR1OR2_utr1_lacI is "RNAP:DNA pOR1OR2--utr1--lacI";
  species CUTP_AGTP_RNAP_DNA_pOR1OR2_utr1_lacI in cell_internal_combined = 0; CUTP_AGTP_RNAP_DNA_pOR1OR2_utr1_lacI is "CUTP:AGTP:RNAP:DNA pOR1OR2--utr1--lacI";
  species term_RNAP_DNA_pOR1OR2_utr1_lacI in cell_internal_combined = 0; term_RNAP_DNA_pOR1OR2_utr1_lacI is "term_RNAP:DNA pOR1OR2--utr1--lacI";
  species AA_2AGTP_Ribo_RNA_utr1_lacI in cell_internal_combined = 0; AA_2AGTP_Ribo_RNA_utr1_lacI is "AA:2AGTP:Ribo:RNA utr1--lacI";
  species term_Ribo_RNA_utr1_lacI in cell_internal_combined = 0; term_Ribo_RNA_utr1_lacI is "term_Ribo:RNA utr1--lacI";
  species protein_deGFP_cell_internal_combined_38 in cell_internal_combined = 0;
  species protein_deGFP_cell_internal_combined_39 in cell_internal_combined = 0; protein_deGFP_cell_internal_combined_39 is "protein deGFP*";
  species RNA_utr1_deGFP in cell_internal_combined = 0; RNA_utr1_deGFP is "RNA utr1--deGFP";
  species Ribo_RNA_utr1_deGFP in cell_internal_combined = 0; Ribo_RNA_utr1_deGFP is "Ribo:RNA utr1--deGFP";
  species DNA_plac_utr1_deGFP in cell_internal_combined = 20.00001/cell_internal_combined; DNA_plac_utr1_deGFP is "DNA plac--utr1--deGFP";
  species RNAP_DNA_plac_utr1_deGFP in cell_internal_combined = 0; RNAP_DNA_plac_utr1_deGFP is "RNAP:DNA plac--utr1--deGFP";
  species CUTP_AGTP_RNAP_DNA_plac_utr1_deGFP in cell_internal_combined = 0; CUTP_AGTP_RNAP_DNA_plac_utr1_deGFP is "CUTP:AGTP:RNAP:DNA plac--utr1--deGFP";
  species term_RNAP_DNA_plac_utr1_deGFP in cell_internal_combined = 0; term_RNAP_DNA_plac_utr1_deGFP is "term_RNAP:DNA plac--utr1--deGFP";
  species AA_2AGTP_Ribo_RNA_utr1_deGFP in cell_internal_combined = 0; AA_2AGTP_Ribo_RNA_utr1_deGFP is "AA:2AGTP:Ribo:RNA utr1--deGFP";
  species term_Ribo_RNA_utr1_deGFP in cell_internal_combined = 0; term_Ribo_RNA_utr1_deGFP is "term_Ribo:RNA utr1--deGFP";
  species IPTG_protein_lacItetramer in cell_internal_combined = 0; IPTG_protein_lacItetramer is "IPTG:protein lacItetramer";
  species AGTP_RNAP_DNA_pOR1OR2_utr1_lacI in cell_internal_combined = 0; AGTP_RNAP_DNA_pOR1OR2_utr1_lacI is "AGTP:RNAP:DNA pOR1OR2--utr1--lacI";
  species CUTP_RNAP_DNA_pOR1OR2_utr1_lacI in cell_internal_combined = 0; CUTP_RNAP_DNA_pOR1OR2_utr1_lacI is "CUTP:RNAP:DNA pOR1OR2--utr1--lacI";
  species AA_Ribo_RNA_utr1_lacI in cell_internal_combined = 0; AA_Ribo_RNA_utr1_lacI is "AA:Ribo:RNA utr1--lacI";
  species RNA_utr1_lacI_RNase in cell_internal_combined = 0; RNA_utr1_lacI_RNase is "RNA utr1--lacI:RNase";
  species Ribo_RNA_utr1_lacI_RNase in cell_internal_combined = 0; Ribo_RNA_utr1_lacI_RNase is "Ribo:RNA utr1--lacI:RNase";
  species AA_2AGTP_Ribo_RNA_utr1_lacI_RNase in cell_internal_combined = 0; AA_2AGTP_Ribo_RNA_utr1_lacI_RNase is "AA:2AGTP:Ribo:RNA utr1--lacI:RNase";
  species term_Ribo_RNA_utr1_lacI_RNase in cell_internal_combined = 0; term_Ribo_RNA_utr1_lacI_RNase is "term_Ribo:RNA utr1--lacI:RNase";
  species AA_Ribo_RNA_utr1_lacI_RNase in cell_internal_combined = 0; AA_Ribo_RNA_utr1_lacI_RNase is "AA:Ribo:RNA utr1--lacI:RNase";
  species AGTP_RNAP_DNA_plac_utr1_deGFP in cell_internal_combined = 0; AGTP_RNAP_DNA_plac_utr1_deGFP is "AGTP:RNAP:DNA plac--utr1--deGFP";
  species CUTP_RNAP_DNA_plac_utr1_deGFP in cell_internal_combined = 0; CUTP_RNAP_DNA_plac_utr1_deGFP is "CUTP:RNAP:DNA plac--utr1--deGFP";
  species DNA_plac_utr1_deGFP_protein_lacItetramer in cell_internal_combined = 0; DNA_plac_utr1_deGFP_protein_lacItetramer is "DNA plac--utr1--deGFP:protein lacItetramer";
  species AA_Ribo_RNA_utr1_deGFP in cell_internal_combined = 0; AA_Ribo_RNA_utr1_deGFP is "AA:Ribo:RNA utr1--deGFP";
  species RNA_utr1_deGFP_RNase in cell_internal_combined = 0; RNA_utr1_deGFP_RNase is "RNA utr1--deGFP:RNase";
  species Ribo_RNA_utr1_deGFP_RNase in cell_internal_combined = 0; Ribo_RNA_utr1_deGFP_RNase is "Ribo:RNA utr1--deGFP:RNase";
  species AA_2AGTP_Ribo_RNA_utr1_deGFP_RNase in cell_internal_combined = 0; AA_2AGTP_Ribo_RNA_utr1_deGFP_RNase is "AA:2AGTP:Ribo:RNA utr1--deGFP:RNase";
  species term_Ribo_RNA_utr1_deGFP_RNase in cell_internal_combined = 0; term_Ribo_RNA_utr1_deGFP_RNase is "term_Ribo:RNA utr1--deGFP:RNase";
  species AA_Ribo_RNA_utr1_deGFP_RNase in cell_internal_combined = 0; AA_Ribo_RNA_utr1_deGFP_RNase is "AA:Ribo:RNA utr1--deGFP:RNase";
  species mwbbb6129b_1e4f_4f45_96c0_f3b1fbebdb22_1_combined in cell_internal_combined = 0; mwbbb6129b_1e4f_4f45_96c0_f3b1fbebdb22_1_combined is "AGTP_USED";
  species mw28f62bd1_3a2b_45ba_be22_53e2eb1a9509_1_combined in cell_internal_combined = 0; mw28f62bd1_3a2b_45ba_be22_53e2eb1a9509_1_combined is "IPTG";
  species mw8581196a_7c77_4da8_879e_f2c6f24b1932_1_combined in cell_internal_combined = 0; mw8581196a_7c77_4da8_879e_f2c6f24b1932_1_combined is "protein alHL*";
  species xxIPTG_protein_alHL in cell_internal_combined = 0; xxIPTG_protein_alHL is "IPTG:protein alHL*";
  species IPTG_1_combined in cell_external_combined = 5000/cell_external_combined;

  // Parameters:
  AGTPdeg_F_combined = 0;
  kb = 2 per_second;
  kd = 1 per_second;

  // Reactions:
  reaction_74: protein_alHL => mw8581196a_7c77_4da8_879e_f2c6f24b1932_1_combined; TXTL_PROT_alHL_MATURATION*protein_alHL;
    TXTL_PROT_alHL_MATURATION = 0.002310491;
  reaction_75: RNA_utr1_alHL + mw27aa16fc_b76d_46c2_b301_0456b7e3aace_1_combined -> Ribo_RNA_utr1_alHL; reaction_75_TXTL_UTR_UTR1_F*RNA_utr1_alHL*mw27aa16fc_b76d_46c2_b301_0456b7e3aace_1_combined - reaction_75_TXTL_UTR_UTR1_R*Ribo_RNA_utr1_alHL;
    reaction_75_TXTL_UTR_UTR1_F = 0.2; reaction_75_TXTL_UTR_UTR1_R = 4;
  reaction_76: DNA_pOR1OR2_utr1_alHL + mw3c367a17_7386_470c_8c72_954a48def552_1_combined -> RNAP_DNA_pOR1OR2_utr1_alHL; reaction_76_TXTL_POR1OR2_RNAPbound_F*DNA_pOR1OR2_utr1_alHL*mw3c367a17_7386_470c_8c72_954a48def552_1_combined - reaction_76_TXTL_POR1OR2_RNAPbound_R*RNAP_DNA_pOR1OR2_utr1_alHL;
    reaction_76_TXTL_POR1OR2_RNAPbound_F = 20; reaction_76_TXTL_POR1OR2_RNAPbound_R = 400;
  reaction_77: CUTP_AGTP_RNAP_DNA_pOR1OR2_utr1_alHL => RNAP_DNA_pOR1OR2_utr1_alHL; reaction_77_TXTL_NTP_consumption*CUTP_AGTP_RNAP_DNA_pOR1OR2_utr1_alHL;
    reaction_77_TXTL_NTP_consumption = 0.7485294;
  reaction_78: term_RNAP_DNA_pOR1OR2_utr1_alHL => mw3c367a17_7386_470c_8c72_954a48def552_1_combined + DNA_pOR1OR2_utr1_alHL; reaction_78_TXTL_RNAPBOUND_TERMINATION_RATE*term_RNAP_DNA_pOR1OR2_utr1_alHL;
    reaction_78_TXTL_RNAPBOUND_TERMINATION_RATE = 0.05;
  reaction_79: RNAP_DNA_pOR1OR2_utr1_alHL + mw34fb2519_79b1_4f10_8668_6410726988c5_1_combined -> AGTP_RNAP_DNA_pOR1OR2_utr1_alHL; reaction_79_TXTL_NTP_RNAP_F*RNAP_DNA_pOR1OR2_utr1_alHL*mw34fb2519_79b1_4f10_8668_6410726988c5_1_combined - reaction_79_TXTL_NTP_RNAP_R*AGTP_RNAP_DNA_pOR1OR2_utr1_alHL;
    reaction_79_TXTL_NTP_RNAP_F = 1000; reaction_79_TXTL_NTP_RNAP_R = 120000000;
  reaction_80: RNAP_DNA_pOR1OR2_utr1_alHL + mw4f8d0806_0366_43d5_8a2a_a05ee3287512_1_combined -> CUTP_RNAP_DNA_pOR1OR2_utr1_alHL; reaction_80_TXTL_NTP_RNAP_F*RNAP_DNA_pOR1OR2_utr1_alHL*mw4f8d0806_0366_43d5_8a2a_a05ee3287512_1_combined - reaction_80_TXTL_NTP_RNAP_R*CUTP_RNAP_DNA_pOR1OR2_utr1_alHL;
    reaction_80_TXTL_NTP_RNAP_F = 1000; reaction_80_TXTL_NTP_RNAP_R = 120000000;
  reaction_81: AGTP_RNAP_DNA_pOR1OR2_utr1_alHL + mw4f8d0806_0366_43d5_8a2a_a05ee3287512_1_combined -> CUTP_AGTP_RNAP_DNA_pOR1OR2_utr1_alHL; reaction_81_TXTL_NTP_RNAP_F*AGTP_RNAP_DNA_pOR1OR2_utr1_alHL*mw4f8d0806_0366_43d5_8a2a_a05ee3287512_1_combined - reaction_81_TXTL_NTP_RNAP_R*CUTP_AGTP_RNAP_DNA_pOR1OR2_utr1_alHL;
    reaction_81_TXTL_NTP_RNAP_F = 1; reaction_81_TXTL_NTP_RNAP_R = 120000;
  reaction_82: CUTP_RNAP_DNA_pOR1OR2_utr1_alHL + mw34fb2519_79b1_4f10_8668_6410726988c5_1_combined -> CUTP_AGTP_RNAP_DNA_pOR1OR2_utr1_alHL; reaction_82_TXTL_NTP_RNAP_F*CUTP_RNAP_DNA_pOR1OR2_utr1_alHL*mw34fb2519_79b1_4f10_8668_6410726988c5_1_combined - reaction_82_TXTL_NTP_RNAP_R*CUTP_AGTP_RNAP_DNA_pOR1OR2_utr1_alHL;
    reaction_82_TXTL_NTP_RNAP_F = 1; reaction_82_TXTL_NTP_RNAP_R = 120000;
  reaction_83: CUTP_AGTP_RNAP_DNA_pOR1OR2_utr1_alHL => term_RNAP_DNA_pOR1OR2_utr1_alHL + RNA_utr1_alHL; reaction_83_TXTL_transcription_rate1*CUTP_AGTP_RNAP_DNA_pOR1OR2_utr1_alHL;
    reaction_83_TXTL_transcription_rate1 = 0.001470588;
  reaction_84: Ribo_RNA_utr1_alHL + mw715c6bbe_f050_4257_8bc2_159625dc5aa5_1_combined -> AA_Ribo_RNA_utr1_alHL; reaction_84_TL_AA_F*Ribo_RNA_utr1_alHL*mw715c6bbe_f050_4257_8bc2_159625dc5aa5_1_combined - reaction_84_TL_AA_R*AA_Ribo_RNA_utr1_alHL;
    reaction_84_TL_AA_F = 300; reaction_84_TL_AA_R = 0.1;
  reaction_85: AA_Ribo_RNA_utr1_alHL + 2 mw34fb2519_79b1_4f10_8668_6410726988c5_1_combined -> AA_2AGTP_Ribo_RNA_utr1_alHL; reaction_85_TL_AGTP_F*AA_Ribo_RNA_utr1_alHL*mw34fb2519_79b1_4f10_8668_6410726988c5_1_combined^2 - reaction_85_TL_AGTP_R*AA_2AGTP_Ribo_RNA_utr1_alHL;
    reaction_85_TL_AGTP_F = 30; reaction_85_TL_AGTP_R = 10;
  reaction_86: AA_2AGTP_Ribo_RNA_utr1_alHL => term_Ribo_RNA_utr1_alHL; reaction_86_TXTL_TL_AA_consumption*AA_2AGTP_Ribo_RNA_utr1_alHL;
    reaction_86_TXTL_TL_AA_consumption = 0.024;
  reaction_87: AA_2AGTP_Ribo_RNA_utr1_alHL => term_Ribo_RNA_utr1_alHL + protein_alHL; reaction_87_TXTL_TL_rate*AA_2AGTP_Ribo_RNA_utr1_alHL;
    reaction_87_TXTL_TL_rate = 0.012;
  reaction_88: term_Ribo_RNA_utr1_alHL => RNA_utr1_alHL + mw27aa16fc_b76d_46c2_b301_0456b7e3aace_1_combined; reaction_88_TXTL_RIBOBOUND_TERMINATION_RATE*term_Ribo_RNA_utr1_alHL;
    reaction_88_TXTL_RIBOBOUND_TERMINATION_RATE = 50;
  reaction_89: RNA_utr1_alHL + mw288eb330_bc2f_470f_9628_e990cb2252e5_1_combined -> RNA_utr1_alHL_RNase; reaction_89_TXTL_RNAdeg_F*RNA_utr1_alHL*mw288eb330_bc2f_470f_9628_e990cb2252e5_1_combined - reaction_89_TXTL_RNAdeg_R*RNA_utr1_alHL_RNase;
    reaction_89_TXTL_RNAdeg_F = 10; reaction_89_TXTL_RNAdeg_R = 2000;
  reaction_90: RNA_utr1_alHL_RNase => mw288eb330_bc2f_470f_9628_e990cb2252e5_1_combined; reaction_90_TXTL_RNAdeg_F*RNA_utr1_alHL_RNase;
    reaction_90_TXTL_RNAdeg_F = 0.002777778;
  reaction_91: Ribo_RNA_utr1_alHL + mw288eb330_bc2f_470f_9628_e990cb2252e5_1_combined -> Ribo_RNA_utr1_alHL_RNase; reaction_91_TXTL_RNAdeg_F*Ribo_RNA_utr1_alHL*mw288eb330_bc2f_470f_9628_e990cb2252e5_1_combined - reaction_91_TXTL_RNAdeg_R*Ribo_RNA_utr1_alHL_RNase;
    reaction_91_TXTL_RNAdeg_F = 10; reaction_91_TXTL_RNAdeg_R = 2000;
  reaction_92: Ribo_RNA_utr1_alHL_RNase => mw288eb330_bc2f_470f_9628_e990cb2252e5_1_combined + mw27aa16fc_b76d_46c2_b301_0456b7e3aace_1_combined; reaction_92_TXTL_RNAdeg_F*Ribo_RNA_utr1_alHL_RNase;
    reaction_92_TXTL_RNAdeg_F = 0.002777778;
  reaction_93: AA_2AGTP_Ribo_RNA_utr1_alHL + mw288eb330_bc2f_470f_9628_e990cb2252e5_1_combined -> AA_2AGTP_Ribo_RNA_utr1_alHL_RNase; reaction_93_TXTL_RNAdeg_F*AA_2AGTP_Ribo_RNA_utr1_alHL*mw288eb330_bc2f_470f_9628_e990cb2252e5_1_combined - reaction_93_TXTL_RNAdeg_R*AA_2AGTP_Ribo_RNA_utr1_alHL_RNase;
    reaction_93_TXTL_RNAdeg_F = 10; reaction_93_TXTL_RNAdeg_R = 2000;
  reaction_94: AA_2AGTP_Ribo_RNA_utr1_alHL_RNase => mw288eb330_bc2f_470f_9628_e990cb2252e5_1_combined + mw715c6bbe_f050_4257_8bc2_159625dc5aa5_1_combined + 2 mw34fb2519_79b1_4f10_8668_6410726988c5_1_combined + mw27aa16fc_b76d_46c2_b301_0456b7e3aace_1_combined; reaction_94_TXTL_RNAdeg_F*AA_2AGTP_Ribo_RNA_utr1_alHL_RNase;
    reaction_94_TXTL_RNAdeg_F = 0.002777778;
  reaction_95: term_Ribo_RNA_utr1_alHL + mw288eb330_bc2f_470f_9628_e990cb2252e5_1_combined -> term_Ribo_RNA_utr1_alHL_RNase; reaction_95_TXTL_RNAdeg_F*term_Ribo_RNA_utr1_alHL*mw288eb330_bc2f_470f_9628_e990cb2252e5_1_combined - reaction_95_TXTL_RNAdeg_R*term_Ribo_RNA_utr1_alHL_RNase;
    reaction_95_TXTL_RNAdeg_F = 10; reaction_95_TXTL_RNAdeg_R = 2000;
  reaction_96: term_Ribo_RNA_utr1_alHL_RNase => mw288eb330_bc2f_470f_9628_e990cb2252e5_1_combined + mw27aa16fc_b76d_46c2_b301_0456b7e3aace_1_combined; reaction_96_TXTL_RNAdeg_F*term_Ribo_RNA_utr1_alHL_RNase;
    reaction_96_TXTL_RNAdeg_F = 0.002777778;
  reaction_97: AA_Ribo_RNA_utr1_alHL + mw288eb330_bc2f_470f_9628_e990cb2252e5_1_combined -> AA_Ribo_RNA_utr1_alHL_RNase; reaction_97_TXTL_RNAdeg_F*AA_Ribo_RNA_utr1_alHL*mw288eb330_bc2f_470f_9628_e990cb2252e5_1_combined - reaction_97_TXTL_RNAdeg_R*AA_Ribo_RNA_utr1_alHL_RNase;
    reaction_97_TXTL_RNAdeg_F = 10; reaction_97_TXTL_RNAdeg_R = 2000;
  reaction_98: AA_Ribo_RNA_utr1_alHL_RNase => mw288eb330_bc2f_470f_9628_e990cb2252e5_1_combined + mw715c6bbe_f050_4257_8bc2_159625dc5aa5_1_combined + mw27aa16fc_b76d_46c2_b301_0456b7e3aace_1_combined; reaction_98_TXTL_RNAdeg_F*AA_Ribo_RNA_utr1_alHL_RNase;
    reaction_98_TXTL_RNAdeg_F = 0.002777778;
  mwdf2c0f1e_af7c_4b62_9d47_6cc4f9f42a01_combined: mw34fb2519_79b1_4f10_8668_6410726988c5_1_combined => mwbbb6129b_1e4f_4f45_96c0_f3b1fbebdb22_1_combined; AGTPdeg_F_combined*mw34fb2519_79b1_4f10_8668_6410726988c5_1_combined;
  reaction_100: protein_lacItetramer + mw28f62bd1_3a2b_45ba_be22_53e2eb1a9509_1_combined -> IPTG_protein_lacItetramer; TXTL_INDUCER_LacI_IPTG_F*protein_lacItetramer*mw28f62bd1_3a2b_45ba_be22_53e2eb1a9509_1_combined - TXTL_INDUCER_LacI_IPTG_R*IPTG_protein_lacItetramer;
    TXTL_INDUCER_LacI_IPTG_F = 0.1; TXTL_INDUCER_LacI_IPTG_R = 0.01;
  reaction_101: 2 protein_lacI -> protein_lacIdimer; kf*protein_lacI^2 - kr*protein_lacIdimer;
    kf = 1.1; kr = 1;
  reaction_102: 2 protein_lacIdimer -> protein_lacItetramer; TXTL_PROT_TETRAMER_proteinlacI_F*protein_lacIdimer^2 - TXTL_PROT_TETRAMER_proteinlacI_R*protein_lacItetramer;
    TXTL_PROT_TETRAMER_proteinlacI_F = 2; TXTL_PROT_TETRAMER_proteinlacI_R = 250;
  reaction_103: RNA_utr1_lacI + mw27aa16fc_b76d_46c2_b301_0456b7e3aace_1_combined -> Ribo_RNA_utr1_lacI; reaction_103_TXTL_UTR_UTR1_F*RNA_utr1_lacI*mw27aa16fc_b76d_46c2_b301_0456b7e3aace_1_combined - reaction_103_TXTL_UTR_UTR1_R*Ribo_RNA_utr1_lacI;
    reaction_103_TXTL_UTR_UTR1_F = 0.2; reaction_103_TXTL_UTR_UTR1_R = 4;
  reaction_104: DNA_pOR1OR2_utr1_lacI + mw3c367a17_7386_470c_8c72_954a48def552_1_combined -> RNAP_DNA_pOR1OR2_utr1_lacI; reaction_104_TXTL_POR1OR2_RNAPbound_F*DNA_pOR1OR2_utr1_lacI*mw3c367a17_7386_470c_8c72_954a48def552_1_combined - reaction_104_TXTL_POR1OR2_RNAPbound_R*RNAP_DNA_pOR1OR2_utr1_lacI;
    reaction_104_TXTL_POR1OR2_RNAPbound_F = 20; reaction_104_TXTL_POR1OR2_RNAPbound_R = 400;
  reaction_105: CUTP_AGTP_RNAP_DNA_pOR1OR2_utr1_lacI => RNAP_DNA_pOR1OR2_utr1_lacI; reaction_105_TXTL_NTP_consumption*CUTP_AGTP_RNAP_DNA_pOR1OR2_utr1_lacI;
    reaction_105_TXTL_NTP_consumption = 0.7487705;
  reaction_106: term_RNAP_DNA_pOR1OR2_utr1_lacI => mw3c367a17_7386_470c_8c72_954a48def552_1_combined + DNA_pOR1OR2_utr1_lacI; reaction_106_TXTL_RNAPBOUND_TERMINATION_RATE*term_RNAP_DNA_pOR1OR2_utr1_lacI;
    reaction_106_TXTL_RNAPBOUND_TERMINATION_RATE = 0.05;
  reaction_107: RNAP_DNA_pOR1OR2_utr1_lacI + mw34fb2519_79b1_4f10_8668_6410726988c5_1_combined -> AGTP_RNAP_DNA_pOR1OR2_utr1_lacI; reaction_107_TXTL_NTP_RNAP_F*RNAP_DNA_pOR1OR2_utr1_lacI*mw34fb2519_79b1_4f10_8668_6410726988c5_1_combined - reaction_107_TXTL_NTP_RNAP_R*AGTP_RNAP_DNA_pOR1OR2_utr1_lacI;
    reaction_107_TXTL_NTP_RNAP_F = 1000; reaction_107_TXTL_NTP_RNAP_R = 120000000;
  reaction_108: RNAP_DNA_pOR1OR2_utr1_lacI + mw4f8d0806_0366_43d5_8a2a_a05ee3287512_1_combined -> CUTP_RNAP_DNA_pOR1OR2_utr1_lacI; reaction_108_TXTL_NTP_RNAP_F*RNAP_DNA_pOR1OR2_utr1_lacI*mw4f8d0806_0366_43d5_8a2a_a05ee3287512_1_combined - reaction_108_TXTL_NTP_RNAP_R*CUTP_RNAP_DNA_pOR1OR2_utr1_lacI;
    reaction_108_TXTL_NTP_RNAP_F = 1000; reaction_108_TXTL_NTP_RNAP_R = 120000000;
  reaction_109: AGTP_RNAP_DNA_pOR1OR2_utr1_lacI + mw4f8d0806_0366_43d5_8a2a_a05ee3287512_1_combined -> CUTP_AGTP_RNAP_DNA_pOR1OR2_utr1_lacI; reaction_109_TXTL_NTP_RNAP_F*AGTP_RNAP_DNA_pOR1OR2_utr1_lacI*mw4f8d0806_0366_43d5_8a2a_a05ee3287512_1_combined - reaction_109_TXTL_NTP_RNAP_R*CUTP_AGTP_RNAP_DNA_pOR1OR2_utr1_lacI;
    reaction_109_TXTL_NTP_RNAP_F = 1; reaction_109_TXTL_NTP_RNAP_R = 120000;
  reaction_110: CUTP_RNAP_DNA_pOR1OR2_utr1_lacI + mw34fb2519_79b1_4f10_8668_6410726988c5_1_combined -> CUTP_AGTP_RNAP_DNA_pOR1OR2_utr1_lacI; reaction_110_TXTL_NTP_RNAP_F*CUTP_RNAP_DNA_pOR1OR2_utr1_lacI*mw34fb2519_79b1_4f10_8668_6410726988c5_1_combined - reaction_110_TXTL_NTP_RNAP_R*CUTP_AGTP_RNAP_DNA_pOR1OR2_utr1_lacI;
    reaction_110_TXTL_NTP_RNAP_F = 1; reaction_110_TXTL_NTP_RNAP_R = 120000;
  reaction_111: CUTP_AGTP_RNAP_DNA_pOR1OR2_utr1_lacI => term_RNAP_DNA_pOR1OR2_utr1_lacI + RNA_utr1_lacI; reaction_111_TXTL_transcription_rate1*CUTP_AGTP_RNAP_DNA_pOR1OR2_utr1_lacI;
    reaction_111_TXTL_transcription_rate1 = 0.001229508;
  reaction_112: Ribo_RNA_utr1_lacI + mw715c6bbe_f050_4257_8bc2_159625dc5aa5_1_combined -> AA_Ribo_RNA_utr1_lacI; reaction_112_TL_AA_F*Ribo_RNA_utr1_lacI*mw715c6bbe_f050_4257_8bc2_159625dc5aa5_1_combined - reaction_112_TL_AA_R*AA_Ribo_RNA_utr1_lacI;
    reaction_112_TL_AA_F = 300; reaction_112_TL_AA_R = 0.1;
  reaction_113: AA_Ribo_RNA_utr1_lacI + 2 mw34fb2519_79b1_4f10_8668_6410726988c5_1_combined -> AA_2AGTP_Ribo_RNA_utr1_lacI; reaction_113_TL_AGTP_F*AA_Ribo_RNA_utr1_lacI*mw34fb2519_79b1_4f10_8668_6410726988c5_1_combined^2 - reaction_113_TL_AGTP_R*AA_2AGTP_Ribo_RNA_utr1_lacI;
    reaction_113_TL_AGTP_F = 30; reaction_113_TL_AGTP_R = 10;
  reaction_114: AA_2AGTP_Ribo_RNA_utr1_lacI => term_Ribo_RNA_utr1_lacI; reaction_114_TXTL_TL_AA_consumption*AA_2AGTP_Ribo_RNA_utr1_lacI;
    reaction_114_TXTL_TL_AA_consumption = 0.03;
  reaction_115: AA_2AGTP_Ribo_RNA_utr1_lacI => term_Ribo_RNA_utr1_lacI + protein_lacI; reaction_115_TXTL_TL_rate*AA_2AGTP_Ribo_RNA_utr1_lacI;
    reaction_115_TXTL_TL_rate = 0.01;
  reaction_116: term_Ribo_RNA_utr1_lacI => RNA_utr1_lacI + mw27aa16fc_b76d_46c2_b301_0456b7e3aace_1_combined; reaction_116_TXTL_RIBOBOUND_TERMINATION_RATE*term_Ribo_RNA_utr1_lacI;
    reaction_116_TXTL_RIBOBOUND_TERMINATION_RATE = 50;
  reaction_117: RNA_utr1_lacI + mw288eb330_bc2f_470f_9628_e990cb2252e5_1_combined -> RNA_utr1_lacI_RNase; reaction_117_TXTL_RNAdeg_F*RNA_utr1_lacI*mw288eb330_bc2f_470f_9628_e990cb2252e5_1_combined - reaction_117_TXTL_RNAdeg_R*RNA_utr1_lacI_RNase;
    reaction_117_TXTL_RNAdeg_F = 10; reaction_117_TXTL_RNAdeg_R = 2000;
  reaction_118: RNA_utr1_lacI_RNase => mw288eb330_bc2f_470f_9628_e990cb2252e5_1_combined; reaction_118_TXTL_RNAdeg_F*RNA_utr1_lacI_RNase;
    reaction_118_TXTL_RNAdeg_F = 0.002777778;
  reaction_119: Ribo_RNA_utr1_lacI + mw288eb330_bc2f_470f_9628_e990cb2252e5_1_combined -> Ribo_RNA_utr1_lacI_RNase; reaction_119_TXTL_RNAdeg_F*Ribo_RNA_utr1_lacI*mw288eb330_bc2f_470f_9628_e990cb2252e5_1_combined - reaction_119_TXTL_RNAdeg_R*Ribo_RNA_utr1_lacI_RNase;
    reaction_119_TXTL_RNAdeg_F = 10; reaction_119_TXTL_RNAdeg_R = 2000;
  reaction_120: Ribo_RNA_utr1_lacI_RNase => mw288eb330_bc2f_470f_9628_e990cb2252e5_1_combined + mw27aa16fc_b76d_46c2_b301_0456b7e3aace_1_combined; reaction_120_TXTL_RNAdeg_F*Ribo_RNA_utr1_lacI_RNase;
    reaction_120_TXTL_RNAdeg_F = 0.002777778;
  reaction_121: AA_2AGTP_Ribo_RNA_utr1_lacI + mw288eb330_bc2f_470f_9628_e990cb2252e5_1_combined -> AA_2AGTP_Ribo_RNA_utr1_lacI_RNase; reaction_121_TXTL_RNAdeg_F*AA_2AGTP_Ribo_RNA_utr1_lacI*mw288eb330_bc2f_470f_9628_e990cb2252e5_1_combined - reaction_121_TXTL_RNAdeg_R*AA_2AGTP_Ribo_RNA_utr1_lacI_RNase;
    reaction_121_TXTL_RNAdeg_F = 10; reaction_121_TXTL_RNAdeg_R = 2000;
  reaction_122: AA_2AGTP_Ribo_RNA_utr1_lacI_RNase => mw288eb330_bc2f_470f_9628_e990cb2252e5_1_combined + mw715c6bbe_f050_4257_8bc2_159625dc5aa5_1_combined + 2 mw34fb2519_79b1_4f10_8668_6410726988c5_1_combined + mw27aa16fc_b76d_46c2_b301_0456b7e3aace_1_combined; reaction_122_TXTL_RNAdeg_F*AA_2AGTP_Ribo_RNA_utr1_lacI_RNase;
    reaction_122_TXTL_RNAdeg_F = 0.002777778;
  reaction_123: term_Ribo_RNA_utr1_lacI + mw288eb330_bc2f_470f_9628_e990cb2252e5_1_combined -> term_Ribo_RNA_utr1_lacI_RNase; reaction_123_TXTL_RNAdeg_F*term_Ribo_RNA_utr1_lacI*mw288eb330_bc2f_470f_9628_e990cb2252e5_1_combined - reaction_123_TXTL_RNAdeg_R*term_Ribo_RNA_utr1_lacI_RNase;
    reaction_123_TXTL_RNAdeg_F = 10; reaction_123_TXTL_RNAdeg_R = 2000;
  reaction_124: term_Ribo_RNA_utr1_lacI_RNase => mw288eb330_bc2f_470f_9628_e990cb2252e5_1_combined + mw27aa16fc_b76d_46c2_b301_0456b7e3aace_1_combined; reaction_124_TXTL_RNAdeg_F*term_Ribo_RNA_utr1_lacI_RNase;
    reaction_124_TXTL_RNAdeg_F = 0.002777778;
  reaction_125: AA_Ribo_RNA_utr1_lacI + mw288eb330_bc2f_470f_9628_e990cb2252e5_1_combined -> AA_Ribo_RNA_utr1_lacI_RNase; reaction_125_TXTL_RNAdeg_F*AA_Ribo_RNA_utr1_lacI*mw288eb330_bc2f_470f_9628_e990cb2252e5_1_combined - reaction_125_TXTL_RNAdeg_R*AA_Ribo_RNA_utr1_lacI_RNase;
    reaction_125_TXTL_RNAdeg_F = 10; reaction_125_TXTL_RNAdeg_R = 2000;
  reaction_126: AA_Ribo_RNA_utr1_lacI_RNase => mw288eb330_bc2f_470f_9628_e990cb2252e5_1_combined + mw715c6bbe_f050_4257_8bc2_159625dc5aa5_1_combined + mw27aa16fc_b76d_46c2_b301_0456b7e3aace_1_combined; reaction_126_TXTL_RNAdeg_F*AA_Ribo_RNA_utr1_lacI_RNase;
    reaction_126_TXTL_RNAdeg_F = 0.002777778;
  reaction_127: protein_deGFP_cell_internal_combined_38 => protein_deGFP_cell_internal_combined_39; TXTL_PROT_deGFP_MATURATION*protein_deGFP_cell_internal_combined_38;
    TXTL_PROT_deGFP_MATURATION = 0.002310491;
  reaction_128: RNA_utr1_deGFP + mw27aa16fc_b76d_46c2_b301_0456b7e3aace_1_combined -> Ribo_RNA_utr1_deGFP; reaction_128_TXTL_UTR_UTR1_F*RNA_utr1_deGFP*mw27aa16fc_b76d_46c2_b301_0456b7e3aace_1_combined - reaction_128_TXTL_UTR_UTR1_R*Ribo_RNA_utr1_deGFP;
    reaction_128_TXTL_UTR_UTR1_F = 0.2; reaction_128_TXTL_UTR_UTR1_R = 4;
  reaction_129: DNA_plac_utr1_deGFP + mw3c367a17_7386_470c_8c72_954a48def552_1_combined -> RNAP_DNA_plac_utr1_deGFP; TXTL_PLAC_RNAPbound_F*DNA_plac_utr1_deGFP*mw3c367a17_7386_470c_8c72_954a48def552_1_combined - TXTL_PLAC_RNAPbound_R*RNAP_DNA_plac_utr1_deGFP;
    TXTL_PLAC_RNAPbound_F = 20; TXTL_PLAC_RNAPbound_R = 400;
  reaction_130: CUTP_AGTP_RNAP_DNA_plac_utr1_deGFP => RNAP_DNA_plac_utr1_deGFP; reaction_130_TXTL_NTP_consumption*CUTP_AGTP_RNAP_DNA_plac_utr1_deGFP;
    reaction_130_TXTL_NTP_consumption = 0.7485294;
  reaction_131: term_RNAP_DNA_plac_utr1_deGFP => mw3c367a17_7386_470c_8c72_954a48def552_1_combined + DNA_plac_utr1_deGFP; reaction_131_TXTL_RNAPBOUND_TERMINATION_RATE*term_RNAP_DNA_plac_utr1_deGFP;
    reaction_131_TXTL_RNAPBOUND_TERMINATION_RATE = 0.05;
  reaction_132: RNAP_DNA_plac_utr1_deGFP + mw34fb2519_79b1_4f10_8668_6410726988c5_1_combined -> AGTP_RNAP_DNA_plac_utr1_deGFP; reaction_132_TXTL_NTP_RNAP_F*RNAP_DNA_plac_utr1_deGFP*mw34fb2519_79b1_4f10_8668_6410726988c5_1_combined - reaction_132_TXTL_NTP_RNAP_R*AGTP_RNAP_DNA_plac_utr1_deGFP;
    reaction_132_TXTL_NTP_RNAP_F = 1000; reaction_132_TXTL_NTP_RNAP_R = 120000000;
  reaction_133: RNAP_DNA_plac_utr1_deGFP + mw4f8d0806_0366_43d5_8a2a_a05ee3287512_1_combined -> CUTP_RNAP_DNA_plac_utr1_deGFP; reaction_133_TXTL_NTP_RNAP_F*RNAP_DNA_plac_utr1_deGFP*mw4f8d0806_0366_43d5_8a2a_a05ee3287512_1_combined - reaction_133_TXTL_NTP_RNAP_R*CUTP_RNAP_DNA_plac_utr1_deGFP;
    reaction_133_TXTL_NTP_RNAP_F = 1000; reaction_133_TXTL_NTP_RNAP_R = 120000000;
  reaction_134: AGTP_RNAP_DNA_plac_utr1_deGFP + mw4f8d0806_0366_43d5_8a2a_a05ee3287512_1_combined -> CUTP_AGTP_RNAP_DNA_plac_utr1_deGFP; reaction_134_TXTL_NTP_RNAP_F*AGTP_RNAP_DNA_plac_utr1_deGFP*mw4f8d0806_0366_43d5_8a2a_a05ee3287512_1_combined - reaction_134_TXTL_NTP_RNAP_R*CUTP_AGTP_RNAP_DNA_plac_utr1_deGFP;
    reaction_134_TXTL_NTP_RNAP_F = 1; reaction_134_TXTL_NTP_RNAP_R = 120000;
  reaction_135: CUTP_RNAP_DNA_plac_utr1_deGFP + mw34fb2519_79b1_4f10_8668_6410726988c5_1_combined -> CUTP_AGTP_RNAP_DNA_plac_utr1_deGFP; reaction_135_TXTL_NTP_RNAP_F*CUTP_RNAP_DNA_plac_utr1_deGFP*mw34fb2519_79b1_4f10_8668_6410726988c5_1_combined - reaction_135_TXTL_NTP_RNAP_R*CUTP_AGTP_RNAP_DNA_plac_utr1_deGFP;
    reaction_135_TXTL_NTP_RNAP_F = 1; reaction_135_TXTL_NTP_RNAP_R = 120000;
  reaction_136: CUTP_AGTP_RNAP_DNA_plac_utr1_deGFP => term_RNAP_DNA_plac_utr1_deGFP + RNA_utr1_deGFP; reaction_136_TXTL_transcription_rate1*CUTP_AGTP_RNAP_DNA_plac_utr1_deGFP;
    reaction_136_TXTL_transcription_rate1 = 0.001470588;
  reaction_137: DNA_plac_utr1_deGFP + protein_lacItetramer -> DNA_plac_utr1_deGFP_protein_lacItetramer; placI_sequestration_F*DNA_plac_utr1_deGFP*protein_lacItetramer - placI_sequestration_R*DNA_plac_utr1_deGFP_protein_lacItetramer;
    placI_sequestration_F = 150; placI_sequestration_R = 0.1;
  reaction_138: Ribo_RNA_utr1_deGFP + mw715c6bbe_f050_4257_8bc2_159625dc5aa5_1_combined -> AA_Ribo_RNA_utr1_deGFP; reaction_138_TL_AA_F*Ribo_RNA_utr1_deGFP*mw715c6bbe_f050_4257_8bc2_159625dc5aa5_1_combined - reaction_138_TL_AA_R*AA_Ribo_RNA_utr1_deGFP;
    reaction_138_TL_AA_F = 300; reaction_138_TL_AA_R = 0.1;
  reaction_139: AA_Ribo_RNA_utr1_deGFP + 2 mw34fb2519_79b1_4f10_8668_6410726988c5_1_combined -> AA_2AGTP_Ribo_RNA_utr1_deGFP; reaction_139_TL_AGTP_F*AA_Ribo_RNA_utr1_deGFP*mw34fb2519_79b1_4f10_8668_6410726988c5_1_combined^2 - reaction_139_TL_AGTP_R*AA_2AGTP_Ribo_RNA_utr1_deGFP;
    reaction_139_TL_AGTP_F = 30; reaction_139_TL_AGTP_R = 10;
  reaction_140: AA_2AGTP_Ribo_RNA_utr1_deGFP => term_Ribo_RNA_utr1_deGFP; reaction_140_TXTL_TL_AA_consumption*AA_2AGTP_Ribo_RNA_utr1_deGFP;
    reaction_140_TXTL_TL_AA_consumption = 0.024;
  reaction_141: AA_2AGTP_Ribo_RNA_utr1_deGFP => term_Ribo_RNA_utr1_deGFP + protein_deGFP_cell_internal_combined_38; reaction_141_TXTL_TL_rate*AA_2AGTP_Ribo_RNA_utr1_deGFP;
    reaction_141_TXTL_TL_rate = 0.012;
  reaction_142: term_Ribo_RNA_utr1_deGFP => RNA_utr1_deGFP + mw27aa16fc_b76d_46c2_b301_0456b7e3aace_1_combined; reaction_142_TXTL_RIBOBOUND_TERMINATION_RATE*term_Ribo_RNA_utr1_deGFP;
    reaction_142_TXTL_RIBOBOUND_TERMINATION_RATE = 50;
  reaction_143: RNA_utr1_deGFP + mw288eb330_bc2f_470f_9628_e990cb2252e5_1_combined -> RNA_utr1_deGFP_RNase; reaction_143_TXTL_RNAdeg_F*RNA_utr1_deGFP*mw288eb330_bc2f_470f_9628_e990cb2252e5_1_combined - reaction_143_TXTL_RNAdeg_R*RNA_utr1_deGFP_RNase;
    reaction_143_TXTL_RNAdeg_F = 10; reaction_143_TXTL_RNAdeg_R = 2000;
  reaction_144: RNA_utr1_deGFP_RNase => mw288eb330_bc2f_470f_9628_e990cb2252e5_1_combined; reaction_144_TXTL_RNAdeg_F*RNA_utr1_deGFP_RNase;
    reaction_144_TXTL_RNAdeg_F = 0.002777778;
  reaction_145: Ribo_RNA_utr1_deGFP + mw288eb330_bc2f_470f_9628_e990cb2252e5_1_combined -> Ribo_RNA_utr1_deGFP_RNase; reaction_145_TXTL_RNAdeg_F*Ribo_RNA_utr1_deGFP*mw288eb330_bc2f_470f_9628_e990cb2252e5_1_combined - reaction_145_TXTL_RNAdeg_R*Ribo_RNA_utr1_deGFP_RNase;
    reaction_145_TXTL_RNAdeg_F = 10; reaction_145_TXTL_RNAdeg_R = 2000;
  reaction_146: Ribo_RNA_utr1_deGFP_RNase => mw288eb330_bc2f_470f_9628_e990cb2252e5_1_combined + mw27aa16fc_b76d_46c2_b301_0456b7e3aace_1_combined; reaction_146_TXTL_RNAdeg_F*Ribo_RNA_utr1_deGFP_RNase;
    reaction_146_TXTL_RNAdeg_F = 0.002777778;
  reaction_147: AA_2AGTP_Ribo_RNA_utr1_deGFP + mw288eb330_bc2f_470f_9628_e990cb2252e5_1_combined -> AA_2AGTP_Ribo_RNA_utr1_deGFP_RNase; reaction_147_TXTL_RNAdeg_F*AA_2AGTP_Ribo_RNA_utr1_deGFP*mw288eb330_bc2f_470f_9628_e990cb2252e5_1_combined - reaction_147_TXTL_RNAdeg_R*AA_2AGTP_Ribo_RNA_utr1_deGFP_RNase;
    reaction_147_TXTL_RNAdeg_F = 10; reaction_147_TXTL_RNAdeg_R = 2000;
  reaction_148: AA_2AGTP_Ribo_RNA_utr1_deGFP_RNase => mw288eb330_bc2f_470f_9628_e990cb2252e5_1_combined + mw715c6bbe_f050_4257_8bc2_159625dc5aa5_1_combined + 2 mw34fb2519_79b1_4f10_8668_6410726988c5_1_combined + mw27aa16fc_b76d_46c2_b301_0456b7e3aace_1_combined; reaction_148_TXTL_RNAdeg_F*AA_2AGTP_Ribo_RNA_utr1_deGFP_RNase;
    reaction_148_TXTL_RNAdeg_F = 0.002777778;
  reaction_149: term_Ribo_RNA_utr1_deGFP + mw288eb330_bc2f_470f_9628_e990cb2252e5_1_combined -> term_Ribo_RNA_utr1_deGFP_RNase; reaction_149_TXTL_RNAdeg_F*term_Ribo_RNA_utr1_deGFP*mw288eb330_bc2f_470f_9628_e990cb2252e5_1_combined - reaction_149_TXTL_RNAdeg_R*term_Ribo_RNA_utr1_deGFP_RNase;
    reaction_149_TXTL_RNAdeg_F = 10; reaction_149_TXTL_RNAdeg_R = 2000;
  reaction_150: term_Ribo_RNA_utr1_deGFP_RNase => mw288eb330_bc2f_470f_9628_e990cb2252e5_1_combined + mw27aa16fc_b76d_46c2_b301_0456b7e3aace_1_combined; reaction_150_TXTL_RNAdeg_F*term_Ribo_RNA_utr1_deGFP_RNase;
    reaction_150_TXTL_RNAdeg_F = 0.002777778;
  reaction_151: AA_Ribo_RNA_utr1_deGFP + mw288eb330_bc2f_470f_9628_e990cb2252e5_1_combined -> AA_Ribo_RNA_utr1_deGFP_RNase; reaction_151_TXTL_RNAdeg_F*AA_Ribo_RNA_utr1_deGFP*mw288eb330_bc2f_470f_9628_e990cb2252e5_1_combined - reaction_151_TXTL_RNAdeg_R*AA_Ribo_RNA_utr1_deGFP_RNase;
    reaction_151_TXTL_RNAdeg_F = 10; reaction_151_TXTL_RNAdeg_R = 2000;
  reaction_152: AA_Ribo_RNA_utr1_deGFP_RNase => mw288eb330_bc2f_470f_9628_e990cb2252e5_1_combined + mw715c6bbe_f050_4257_8bc2_159625dc5aa5_1_combined + mw27aa16fc_b76d_46c2_b301_0456b7e3aace_1_combined; reaction_152_TXTL_RNAdeg_F*AA_Ribo_RNA_utr1_deGFP_RNase;
    reaction_152_TXTL_RNAdeg_F = 0.002777778;
  r1: IPTG_1_combined + mw8581196a_7c77_4da8_879e_f2c6f24b1932_1_combined -> xxIPTG_protein_alHL; kb*IPTG_1_combined*mw8581196a_7c77_4da8_879e_f2c6f24b1932_1_combined - kd*xxIPTG_protein_alHL;
  r2: xxIPTG_protein_alHL -> mw28f62bd1_3a2b_45ba_be22_53e2eb1a9509_1_combined + mw8581196a_7c77_4da8_879e_f2c6f24b1932_1_combined; kd*xxIPTG_protein_alHL - kb*mw28f62bd1_3a2b_45ba_be22_53e2eb1a9509_1_combined*mw8581196a_7c77_4da8_879e_f2c6f24b1932_1_combined;

  // Events:
  event_155: at (time <= 5400): AGTPdeg_F_combined = 0;
  event_156: at (time > 5400): AGTPdeg_F_combined = 0.0002;
  event_157: at (time <= 5400): AGTPdeg_F_combined = 0;
  event_158: at (time > 5400): AGTPdeg_F_combined = 0.0002;

  // Unit definitions:
  unit volume = litre;
  unit substance = mole;
  unit area = metre^2;
  unit per_second = 1 / second;
end
