// SBML level 3 version 2

model combined_model_of__bioscrape_generated_model_288980_bioscrape_generated_model_963930()
  // model units - substance: mole, time: second, volume: litre, area: square_metre, length: metre, extent: mole

  // Compartments:
  compartment default_bioscrape_generated_model_288980_combined = 2e-6;

  // Species:
  species G_bioscrape_generated_model_288980 in default_bioscrape_generated_model_288980_combined = 1;
  species S_bioscrape_generated_model_288980 in default_bioscrape_generated_model_288980_combined = 0;
  species mRNA_T_bioscrape_generated_model_288980_1_combined in default_bioscrape_generated_model_288980_combined = 0;
  species X_bioscrape_generated_model_963930 in default_bioscrape_generated_model_288980_combined = 0;

  // Parameters:
  KI_bioscrape_generated_model_288980 = 10;
  KX_bioscrape_generated_model_288980 = 2;
  DummyVar_PositiveHillPropensity_n_0_bioscrape_generated_model_963930 = 1;
  KR_bioscrape_generated_model_963930 = 20;
  KTR_bioscrape_generated_model_963930 = 5;
  delta_combined = 0.1;
  n_combined = 2;

  // Reactions:
  r0_bioscrape_generated_model_288980: G_bioscrape_generated_model_288980 => G_bioscrape_generated_model_288980 + mRNA_T_bioscrape_generated_model_288980_1_combined; G_bioscrape_generated_model_288980*KX_bioscrape_generated_model_288980*S_bioscrape_generated_model_288980^n_combined/(KI_bioscrape_generated_model_288980 + S_bioscrape_generated_model_288980^n_combined);  // modifiers: S_bioscrape_generated_model_288980
  r1_bioscrape_generated_model_288980: mRNA_T_bioscrape_generated_model_288980_1_combined => ; delta_combined*mRNA_T_bioscrape_generated_model_288980_1_combined;
  r0_bioscrape_generated_model_963930: mRNA_T_bioscrape_generated_model_288980_1_combined => mRNA_T_bioscrape_generated_model_288980_1_combined + X_bioscrape_generated_model_963930; KTR_bioscrape_generated_model_963930*mRNA_T_bioscrape_generated_model_288980_1_combined^n_combined/(KR_bioscrape_generated_model_963930 + mRNA_T_bioscrape_generated_model_288980_1_combined^DummyVar_PositiveHillPropensity_n_0_bioscrape_generated_model_963930);
  r1_bioscrape_generated_model_963930: X_bioscrape_generated_model_963930 => ; X_bioscrape_generated_model_963930*delta_combined;

  // Unit definitions:
  unit square_metre = metre^2;
end
