// SBML level 3 version 1

model shared_subsystems_()
  // model units - substance: count, time: second, extent: mole

  // Compartments:
  compartment cell = 5 litre;

  // Species:
  species inP_X_1 in cell = 0; inP_X_1 is "inP:X";
  species X_P_1 in cell = 0; X_P_1 is "X:P";
  species E_1 in cell = 50/cell;
  species E_X_P_1 in cell = 0; E_X_P_1 is "E:X:P";
  species inP_X_P_1 in cell = 0; inP_X_P_1 is "inP:X:P";
  species X_P_P_1 in cell = 0; X_P_P_1 is "X:P:P";
  species E_X_P_P_1 in cell = 0; E_X_P_P_1 is "E:X:P:P";
  species inP_X_2 in cell = 0; inP_X_2 is "inP:X";
  species X_P_2 in cell = 0; X_P_2 is "X:P";
  species E_2 in cell = 50/cell;
  species E_X_P_2 in cell = 0; E_X_P_2 is "E:X:P";
  species inP_X_P_2 in cell = 0; inP_X_P_2 is "inP:X:P";
  species X_P_P_2 in cell = 0; X_P_P_2 is "X:P:P";
  species E_X_P_P_2 in cell = 0; E_X_P_P_2 is "E:X:P:P";
  species $inP_1_shared in cell = 20/cell;
  species X_1_shared in cell = 20/cell;

  // Parameters:
  k1f_1 = 1 per_second;
  k1r_1 = 1 per_second;
  k2f_1 = 1 per_second;
  k3f_1 = 1 per_second;
  k3r_1 = 1 per_second;
  k4f_1 = 1 per_second;
  k5f_1 = 1 per_second;
  k5r_1 = 1 per_second;
  k6f_1 = 1 per_second;
  k7f_1 = 1 per_second;
  k7r_1 = 1 per_second;
  k8f_1 = 1 per_second;
  k1f_2 = 1 per_second;
  k1r_2 = 1 per_second;
  k2f_2 = 1 per_second;
  k3f_2 = 1 per_second;
  k3r_2 = 1 per_second;
  k4f_2 = 1 per_second;
  k5f_2 = 1 per_second;
  k5r_2 = 1 per_second;
  k6f_2 = 1 per_second;
  k7f_2 = 1 per_second;
  k7r_2 = 1 per_second;
  k8f_2 = 1 per_second;

  // Reactions:
  r1_1: $inP_1_shared + X_1_shared -> inP_X_1; k1f_1*inP_1_shared*X_1_shared - k1r_1*inP_X_1;
  r2_1: inP_X_1 => $inP_1_shared + X_P_1; k2f_1*inP_X_1;
  r3_1: E_1 + X_P_1 -> E_X_P_1; k3f_1*E_1*X_P_1 - k3r_1*E_X_P_1;
  r4_1: E_X_P_1 => E_1 + X_1_shared; k4f_1*E_X_P_1;
  r5_1: $inP_1_shared + X_P_1 -> inP_X_P_1; k5f_1*inP_1_shared*X_P_1 - k5r_1*inP_X_P_1;
  r6_1: inP_X_P_1 => X_P_P_1 + $inP_1_shared; k6f_1*inP_X_P_1;
  r7_1: E_1 + X_P_P_1 -> E_X_P_P_1; k7f_1*E_1*X_P_P_1 - k7r_1*E_X_P_P_1;
  r8_1: E_X_P_P_1 => X_P_1 + E_1; k8f_1*E_X_P_P_1;
  r1_2: $inP_1_shared + X_1_shared -> inP_X_2; k1f_2*inP_1_shared*X_1_shared - k1r_2*inP_X_2;
  r2_2: inP_X_2 => $inP_1_shared + X_P_2; k2f_2*inP_X_2;
  r3_2: E_2 + X_P_2 -> E_X_P_2; k3f_2*E_2*X_P_2 - k3r_2*E_X_P_2;
  r4_2: E_X_P_2 => E_2 + X_1_shared; k4f_2*E_X_P_2;
  r5_2: $inP_1_shared + X_P_2 -> inP_X_P_2; k5f_2*inP_1_shared*X_P_2 - k5r_2*inP_X_P_2;
  r6_2: inP_X_P_2 => X_P_P_2 + $inP_1_shared; k6f_2*inP_X_P_2;
  r7_2: E_2 + X_P_P_2 -> E_X_P_P_2; k7f_2*E_2*X_P_P_2 - k7r_2*E_X_P_P_2;
  r8_2: E_X_P_P_2 => X_P_2 + E_2; k8f_2*E_X_P_P_2;

  // Unit definitions:
  unit per_second = 1 / second;
  unit count = dimensionless;
end
